! Ansys APDL Script Template for L-Bracket Validation
! Generated by Export_Ansys_Layouts.py
!
! This script loads the optimized screw positions and runs FEA validation.
!
! STEP 1: Load geometry (L-bracket from CAD)
/prep7
! Import geometry or define manually based on lbracket.json

! STEP 2: Define material properties
MP,EX,1,70000    ! Base material (Aluminum) - MPa
MP,PRXY,1,0.3
MP,EX,2,200000   ! Bolt material (Steel) - MPa
MP,PRXY,2,0.3

! STEP 3: Apply screw positions (from exported JSON)
! Screw 1: x={s1_x}, y={s1_y}
! Screw 2: x={s2_x}, y={s2_y}
! Create circular regions at these positions with radius=5mm

! STEP 4: Mesh
! Use appropriate element type (PLANE182 or SOLID186)
! Refine mesh around screw locations

! STEP 5: Boundary conditions
! Fix top edge of vertical leg (matching lbracket.json fixed_dofs)
! Apply load at tip of horizontal leg: -1000N in Y direction

! STEP 6: Solve
/solu
solve

! STEP 7: Extract compliance
/post1
! Compliance = 0.5 * F^T * U
! Compare with Julia/MMC predictions

! Expected compliance from Julia: ~939 J
! Expected compliance from MMC: ~0.43 (normalized, needs conversion)
